echo both
dimension 3
atom_style granular
boundary f f f
newton off
region dominio block 0 100 0 100 0 100 units box
create_box 2 dominio
create_atoms 1 single 49.0 50.0 50 units box
create_atoms 2 single 50.5 50.0 50 units box
set atom 1 vx 10
set atom 1 vy 0
set atom 1 diameter 2
set atom 1 density  1.90985485103132161955691
set atom 1 omegay   0
set	atom 2 vx 0
set	atom 2 vy 0
set atom 2 diameter 1
set atom 2 density  1.90985485103132161955691
neighbor		1 bin
neigh_modify	delay 0
fix 			m1 all property/global youngsModulus peratomtype 763.94194041252864782277e7 763.94194041252864782277e7
fix 			m2 all property/global poissonsRatio peratomtype 0.3 0.3
fix 			m3 all property/global coefficientRestitution peratomtypepair 2 0.5 0.5 0.5 0.5
fix 			m4 all property/global coefficientFriction peratomtypepair 2 0.5 0.5 0.5 0.5
fix 		 	m5 all property/global characteristicVelocity scalar 10
pair_style		gran/hooke/history/energy  1 0
pair_coeff		* *
communicate		single vel yes
fix    			1 all nve/sphere
timestep		0.0000001
run 0
compute			rot_e all erotate/sphere
compute		    	epotN all reduce sum f_CPEn
compute			edisN all reduce sum f_CDEn
compute			epotT all reduce sum f_CPEt
compute			edisTV all reduce sum f_CDEVt
compute			edisTF all reduce sum f_CDEFt
compute			workT all reduce sum f_CTFW
compute			edisH all reduce sum f_DEH
variable		eCon equal "ke + c_rot_e + c_epotN"
variable		eTot equal "v_eCon + c_edisN + c_workT + c_edisTF+c_edisTV+c_edisH"
variable		eKin equal "ke"
thermo_style		custom step atoms ke c_rot_e c_epotN c_epotT c_edisN c_edisTV c_edisTF c_workT v_eCon v_eTot c_edisH
thermo			1
thermo_modify		lost ignore norm no
compute_modify		thermo_temp dynamic yes
dump			mydmp all custom 10 files/dump-prueba id type mass x y z ix iy iz vx vy vz fx fy fz omegax omegay omegaz radius f_CPEn f_CDEn f_CPEt f_CDEVt f_CDEFt f_CTFW f_DEH
run			10000
